# Teräsbetonikonsolin mitoitus
# Versio: 1.1/2017
# Laskentapohjan käyttö
# -tarkastellaan teräsbetonikonsolia, jonka mitat ja kuormat ovat tiedossa
# -konsoli voi olla suora tai vino
# -pilarin poikkileikkaus jatkuu samanlaisena konsolin yläpuolella.
#
# Raudoituksen sijoittelu
# -
#
# Rakenneluokat
# -Jos käytetään rakenneluokan 1 mukaisia materiaaliosavarmuuskertoimia, tulee varmistaa että EN 1992-1-1:n kansallisen liitteen liitteen A kohdan A.2.1 mukaiset vaatimukset täyttyvät.
# Lähde: | EN 1992-1-1, by210
# Konsolin geometria
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# korkeus
h_c := 590*mm
# Leveys
b := 280 mm
# Betonipeitepaksuus
c_c := 35 mm
# kuorman painopisteen etäisyys pilarin reunasta:
a_c := 250*mm
# kuormitusalueen leveys
a_5 := 230*mm
# neopreenin korkeus
h_n := 10*mm
# Materiaaliparametrit
# Betoni
# materiaaliosa-
# varmuuskerroin
γ_c := 1.5
α_cc := 0.85
# puristuslujuus
f_ck := 30*MPa
f_cd := α_cc*f_ck/γ_c
f_cd = 17 MPa
# Raudoitus
# materiaaliosa-
# varmuuskerroin
γ_s := 1.15
# myötölujuus
f_yk := 500*MPa
f_yd := f_yk/γ_s
f_yd = 434.783 MPa
# Kuormat
# pystykuorma
F_Ed := 300 kN = 300 kN
# vaakakuorman
# kerroin
k := 0.2  # k=0.2 jos neopren, muuten k=0.5
# vaakakuorma
H_Ed := k*F_Ed = 60 kN
# Raudoitus
# Pääraudoitus
n_1 := 8
ϕ_1 := 12*mm
A_s.1 := n_1*π*(ϕ_1/2)^2 = 904.779 mm^2
n_2 := 0
ϕ_2 := 10*mm
A_s.2 := n_2*π*(ϕ_2/2)^2 = 0 mm^2
A_s.tot := A_s.1 + A_s.2 = 904.779 mm^2
# Hakaraudoitus
# Haan halkaisija:
ϕ_sw := 12*mm
# Mitoitus
# Betonin kestävyyden laskenta
# Betonin puristusjännityksen tarkistus solmuissa
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# Solmu2
# betonin sallittu puristusjännitys
f_cd1 := 1.00*(1 - f_ck/(250*MPa))*f_cd = 14.96 MPa
# puristusjännityksen pystysuuntaisen osuuden leveys solmussa 2
x_1 := F_Ed/(b*f_cd1) = 71.6196 mm
# pystykuorman momenttivarsi
c := a_c + x_1/2 = 285.81 mm
# pääraudoitteen painopisteen etäisyys konsolin alareunasta
d := h_c - c_c - ϕ_1/2 = 549 mm
# vaakakuorman etäisyys pääraudoituksen painopisteestä
h_1 := h_c + h_n - d = 51 mm
# Ulkoisten kuormien aiheuttama momentti
M_Ed.s := F_Ed*c + H_Ed*h_1 = 88.8029 kN*m
a_0 :=
    a_0 ← 1 mm
    while M_Ed.s/(d - a_0/2)/(b*a_0) > f_cd1
        a_0 ← a_0 + 1 mm
    a_0
    = 41 mm
# Solmun 2 puristusvoiman vaakakomponentin korkeus:
a_0 = 41 mm
# vaakavoimien välinen momenttivarsi
z := d - a_0/2 = 528.5 mm
# alueen leveys jolle puristusjännitys jakaantuu solmussa 2
a_4 := sqrt(x_1^2 + a_0^2) = 82.5249 mm
# solmuun 2 vaikuttava vaakavoima
F_c0 := M_Ed.s/z = 168.028 kN
# betonin vaakasuora jännitys solmussa 2
σ_c0 := F_c0/(b*a_0) = 14.6366 MPa
# Käyttöaste
KA_c.1 := σ_c0/f_cd1 = 0.978383
# Puristusdiagonaalin kulma vaakavoimaan nähden:
θ := atan(z/c) = 61.5957 deg
# Puristusdiagonaalin kokonaisvoima:
F_c := cos(θ)*F_Ed + sin(θ)*F_c0 = 290.507 kN
# Solmu1
# Betonin sallittu puristusjännitys:
f_cd2 := 0.85*(1 - f_ck/(250*MPa))*f_cd = 12.716 MPa
# betonin pystysuora jännitys solmussa 1
σ_c5 := F_Ed/(b*a_5)*(1 + (H_Ed/F_Ed)^2) = 4.84472 MPa
KA_c.2 := σ_c5/f_cd2 = 0.380994
# Käyttöaste
# Mitta u
u := 2*c_c = 70 mm
# Diagonaalin leveys
a_2 := a_5*sin(θ) + u*cos(θ) = 0.235609 m
# Diagonaalin puristusjännitys:
σ_c4 := F_c/(a_2*b) = 4.40358 MPa
# Käyttöaste:
KA_c.3 := σ_c4/f_cd2 = 0.346302
# vaakavoima
F_t1 := F_c0 + H_Ed = 228.028 kN
kontrolli := if(1 ≤ z/c, if(2.5 ≥ z/c, "OK", "θ on liian suuri"), "θ on liian pieni")
# Puristusdiagonaalin kulma:
θ = 61.5957 deg
# Onko betonin puristusdiagonaalin kulma sallituissa rajoissa?
kontrolli = "OK"
# betonin käyttöaste kuorman alla:
KA_c := max(KA_c.2, KA_c.3) = 0.380994
# Tarvittavan raudoituksen laskenta
# Pääraudoitus
# Tarvittava pääraudoitus
A_s.vaad := F_t1/f_yd = 524.465 mm^2
# Pääraudoituksen käyttöaste:
KA_s1 := A_s.vaad/A_s.tot = 0.579661
# Haat
# Leikkauskestävyyden tarkastus
# Leikkausraudoittamaton rakenne
# Lähde: EC2. 6.2.2
# Raudoitussuhde:
ρ_1 := A_s.tot/(b*d) = 0.00588589
# Kerroin:
C_Rd.c := 0.18/γ_c = 0.12
# Kerroin:
k_1 := 0.15
# Normaalijännitys:
σ_cp := min(0.2*f_ck/γ_c, -k*F_Ed/(b*d)) = -0.39032 N/mm^2
# Kerroin:
k_2 := min(2, 1 + sqrt(200*mm/d)) = 1.60357
# Leikkauskestävyyden mitoitusarvo:
V_Rd.c := (C_Rd.c*k_2*(100*ρ_1*f_ck*mm^2/N)^(1/3)*N/mm^2 + k_1*σ_cp)*b*d = 68.0273 kN
# Leikkauskestävyyden pienin arvo:
V_Rd.min := (0.035*k_2^(3/2)*(f_ck*mm^2/N)^(1/2)*N/mm^2 + k_1*σ_cp)*b*d = 50.84 kN
KA_1 := F_Ed/V_Rd.min = 5.90087
# Kerroin:
# (EC2- (6.6N)
v_k := 0.6*(1 - f_ck/(250*MPa)) = 0.528
KA_2 := F_Ed/(0.5*b*d*v_k*f_cd) = 0.434849  # (EC-6.2.2 (6.5))
# Leikkauskestävyys:
V_Rd := max(V_Rd.c, V_Rd.min) = 68.0273 kN
# Leikkausvoiman
# pienennyskerroin konsoleille:
# (EC2-6.2.2(6))
β :=
    if 0.5*d ≤ a_c ≤ 2*d
        a_c/(2*d)
    also if a_c < 0.5*d
        0.25
    else
        1
    = 0.25
# Leikkauksen käyttöaste:
KA_3 := β*F_Ed/V_Rd.c = 1.1025
KA_v := min(F_Ed/V_Rd.min, max(F_Ed/(0.5*b*d*v_k*f_cd), β*F_Ed/V_Rd.c)) = 1.1025
testi :=
    if a_c < 0.5*h_c and KA_v > 1
        ["Tarvitaan vaakahaat"; ceil(A_s.tot/(ϕ_sw^2*π/4*2))]
    else if KA_v > 1
        ["Tarvitaan pystyhaat"; ceil(F_Ed/(ϕ_sw^2*π/4*f_yd*2))]
    else
        ["Hakoja ei tarvita"; 0]
    = ["Tarvitaan vaakahaat"; 4]
haat := testi[0]
n_sw := testi[1]
# Tarvitaanko konsoliin hakoja?
haat = "Tarvitaan vaakahaat"
# Tarvittava kaksileikkeisten
# hakojen määrä:
n_sw = 4
